n := 2.7
Swr := 0.1
Snr := 0.0
Sweff(Sw) := (Sw - Swr)/(1 - Swr)
Sneff(Sw) := 1 - Sweff(Sw)
Pd := 755
Pc(Sw) := Pd*Sweff(Sw)^(-1/n)
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krw(Sw) := Sweff(Sw)^((2 + 3*n)/n)
krn(Sw) := (1 - Sweff(Sw))^2*(1 - Sweff(Sw)^((2 + n)/n))
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PcSw(Sw) := Pd/(-n)*Sweff(Sw)^(-1/n - 1)*1/(1 - Swr)
PcSn(Sn) := Pd/n*Sweff(1 - Sn)^(-1/n - 1)*1/(1 - Swr)
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