n := 3.25
alfa := 0.00048
siggw := 20
signw := 30
siggn := 10
betagn := siggw/siggn
betanw := siggw/signw
Pdnw := 1/(alfa*betanw) = 3125
Pdgn := 1/(alfa*betagn) = 1041.67
Swr := 0.0
Sgr := 0.0
Snr := 0.0
Sweff(Sw) := (Sw - Swr)/(1 - Swr - Sgr - Snr)
Sgeff(Sg) := (Sg - Sgr)/(1 - Swr - Sgr - Snr)
Sneff(Sw, Sg) := 1 - Sweff(Sw) - Sgeff(Sg)
Pcnw(Sw) := Pdnw*(Sweff(Sw)^(n/(1 - n)) - 1)^(1/n)
Pcgn(Sg) := Pdgn*((1 - Sgeff(Sg))^(n/(1 - n)) - 1)^(1/n)
PcnwS(Sw) := Pdnw/(1 - n)*(Sweff(Sw)^(n/(1 - n)) - 1)^(1/n - 1)*Sweff(Sw)^(n/(1 - n) - 1)*1/(1 - Swr - Sgr - Snr) → -1.39*10^3/((1/(1*Sw)^1.44 - 1)^0.69*(1*Sw)^2.44)
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krw(Sw) :=
    (Sweff(Sw) > 0)^0.5*(1 - (1 - Sweff(Sw)^(n/(n - 1)))^((n - 1)/n))^2 if 1 > Sweff(Sw) > 0
    1 if Sweff(Sw) ≥ 1
    0 otherwise
PcgnS(Sg) := Pdgn/(1 - n)*((1 - Sgeff(Sg))^(n/(1 - n)) - 1)^(1/n - 1)*(1 - Sgeff(Sg))^(n/(1 - n) - 1)*(-1)/(1 - Swr - Sgr - Snr) → 462.96/((-1*Sg + 1)^2.44*(1/(-1*Sg + 1)^1.44 - 1)^0.69)
krg(Sg) :=
    Sgeff(Sg)^0.5*(1 - (1 - Sgeff(Sg))^(n/(n - 1)))^(2*(n - 1)/n) if 1 > Sgeff(Sg) > 0
    1 if Sgeff(Sg) ≥ 1
    0 otherwise
Sw1 := 0.1
Sw2 := 0.95
Sg1 := 0.05
Sg2 := 0.9
aw(Sw) := PcnwS(Sw)
bw(Sw) := Pcnw(Sw) - PcnwS(Sw)*Sw
ag(Sg) := PcgnS(Sg)
bg(Sg) := Pcgn(Sg) - PcgnS(Sg)*Sg
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yw1(Sw) := aw(Sw1)*Sw + bw(Sw1) → -3.964*10^4*Sw + 1.256*10^4
yw2(Sw) := aw(Sw2)*Sw + bw(Sw2) → -9.298*10^3*Sw + 1.025*10^4
yg1(Sg) := ag(Sg1)*Sg + bg(Sg1) → 3.099*10^3*Sg + 318.124
yg2(Sg) := ag(Sg2)*Sg + bg(Sg2) → 1.321*10^4*Sg - 9.025*10^3
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PcW(Sw) :=
    yw1(Sw) if Sw ≤ Sw1
    Pcnw(Sw) if Sw > Sw1 and Sw < Sw2
    yw2(Sw) if Sw ≥ Sw2
PcG(Sg) :=
    yg1(Sg) if Sg ≤ Sg1
    Pcgn(Sg) if Sg > Sg1 and Sg < Sg2
    yg2(Sg) if Sg ≥ Sg2
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krng(Sw, Sg) := Sneff(Sw, Sg)^0.5*(1 - (1 - Sneff(Sw, Sg)^(n/(n - 1)))^((n - 1)/n))^2
krnw(Sw) := (1 - Sweff(Sw))^0.5*(1 - Sweff(Sw)^(n/(n - 1)))^(2*(n - 1)/n)
krn(Sw, Sg) :=
    Sneff(Sw, Sg)*krnw(Sw)*krng(Sw, Sg)/((1 - Sw)*(1 - Sg)) if Sneff(Sw, Sg) > 0
    0 otherwise
# [component: inputs krn]
d/dSw(Pcnw(Sw)) → -1.39*10^3/((1/(1*Sw)^1.44 - 1)^0.69*(1*Sw)^2.44)
d/dSg(Pcgn(Sg)) → 462.96/((-1*Sg + 1)^2.44*(1/(-1*Sg + 1)^1.44 - 1)^0.69)
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# Van genuhten
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kn(Sw, Sg) :=
    (1 - Sgeff(Sg) - Sweff(Sw))^(1/2)*((1 - Sweff(Sw)^(n/(n - 1)))^((n - 1)/n) - (1 - (1 - Sgeff(Sg))^(n/(n - 1)))^((n - 1)/n))^2 if Sgeff(Sg) + Sweff(Sw) < 1
    0 otherwise
# [component: inputs kn]
# Модель проницаемостей из "Подземной гидромеханики" + лин. комбинация для нефти из ECLIPSE
