n := 3.25
alfa := 0.00048
siggw := 20
signw := 30
siggn := 10
betagn := siggw/siggn
betanw := siggw/signw
Pdnw := 1/(alfa*betanw) = 3125
Pdgn := 1/(alfa*betagn) = 1041.67
Swr := 0.0
Sgr := 0.0
Snr := 0.0
Sweff(Sw) := (Sw - Swr)/(1 - Swr - Sgr - Snr)
Sgeff(Sg) := (Sg - Sgr)/(1 - Swr - Sgr - Snr)
Sneff(Sw, Sg) := 1 - Sweff(Sw) - Sgeff(Sg)
Pcnw(Sw) := Pdnw*(Sweff(Sw)^(n/(1 - n)) - 1)^(1/n)
Pcgn(Sg) := Pdgn*((1 - Sgeff(Sg))^(n/(1 - n)) - 1)^(1/n)
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krw(Sw) := Sweff(Sw)^0.5*(1 - (1 - Sweff(Sw)^(n/(n - 1)))^((n - 1)/n))^2
krg(Sg) := Sgeff(Sg)^0.5*(1 - (1 - Sgeff(Sg))^(n/(n - 1)))^(2*(n - 1)/n)
krng(Sw, Sg) := Sneff(Sw, Sg)^0.5*(1 - (1 - Sneff(Sw, Sg)^(n/(n - 1)))^((n - 1)/n))^2
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krnw(Sw) := (1 - Sweff(Sw))^0.5*(1 - Sweff(Sw)^(n/(n - 1)))^(2*(n - 1)/n)
krn(Sw, Sg) := Sneff(Sw, Sg)*krnw(Sw)*krng(Sw, Sg)/((1 - Sweff(Sw))*(1 - Sgeff(Sg)))
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PcnwS(Sw) := Pdnw/(1 - n)*(Sweff(Sw)^(n/(1 - n)) - 1)^(1/n - 1)*Sweff(Sw)^(n/(1 - n) - 1)*1/(1 - Swr - Sgr - Snr) → -1.39*10^3/((1/(1*Sw)^1.44 - 1)^0.69*(1*Sw)^2.44)
d/dSw(Pcnw(Sw)) → -1.39*10^3/((1/(1*Sw)^1.44 - 1)^0.69*(1*Sw)^2.44)
PcgnS(Sg) := Pdgn/(1 - n)*((1 - Sgeff(Sg))^(n/(1 - n)) - 1)^(1/n - 1)*(1 - Sgeff(Sg))^(n/(1 - n) - 1)*(-1)/(1 - Swr - Sgr - Snr) → 462.96/((-1*Sg + 1)^2.44*(1/(-1*Sg + 1)^1.44 - 1)^0.69)
d/dSg(Pcgn(Sg)) → 462.96/((-1*Sg + 1)^2.44*(1/(-1*Sg + 1)^1.44 - 1)^0.69)
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